// COMSOL Multiphysics 5.4.0.215 model "glass_plate.mph"
// Radiative Cooling of a Glass Plate
// modeldescr_heat/glass_plate
// A glass melt is cooled down by radiation to form the final shape. The simulation of radiation is performed using the three radiation in participating media models provided in COMSOL Multiphysics to compare the accuracies and computational costs.
// Outline of the model tree
// Components: comp1 "Component 1", comp2 "Component 2", comp3 "Component 3"

Parameters
  nr = 1.45  // Refractive index
  T0 = 600[degC]  // Initial temperature
  T_amb = 20[degC]  // Ambient temperature
  k = 5  // Absorption coefficient

Geometry
  geom1 "Geometry 1" [comp1] (3D, length unit cm)
    cyl1: Cylinder | r = 5; h = 1.5
    fin: Finalize "Form Union"
  geom2 "Geometry 2" [comp2] (3D, length unit cm)
  geom3 "Geometry 3" [comp3] (3D, length unit cm)

Materials
  mat1: Common "Glass"
    def "Basic"
      thermalconductivity = 1.2
      density = 2200
      heatcapacity = 850
      absorption = k
      scattering = 0
      emissivity = 1
  matlnk1: Link "Material Link 1" [comp1] on all domains
  matlnk2: Link "Material Link 2" [comp1] on all boundaries
  matlnk3: Link "Material Link 3" [comp2] on all domains
  matlnk4: Link "Material Link 4" [comp2] on all boundaries
  matlnk5: Link "Material Link 5" [comp3] on all domains
  matlnk6: Link "Material Link 6" [comp3] on all boundaries

Physics
  ht: HeatTransfer "Heat Transfer in Solids" [geom1] on all domains
    dependent variable T
    solid1: SolidHeatTransferModel "Solid 1" (default)
    init1: init "Initial Values 1" (default) | Tinit = T0
    ins1: ThermalInsulation (default)
    sar1: SurfaceToAmbientRadiation on all boundaries | Tamb = T_amb
  rpm: ParticipatingMediaRadiation "Radiation in Participating Media" [geom1] on all domains
    dependent variable radiativeintensity
    ParticipatingMediaSettingsProperty.nrad = nr
    ParticipatingMediaSettingsProperty.PerfIndex = 0.6
    rpm1: ParticipatingMedium (default)
    os1: OpaqueSurface (default)
    cib1: ContinuityOnInteriorBoundary (default)
  ht2: HeatTransfer "Heat Transfer in Solids" [geom2] on all domains
    dependent variable T
    solid1: SolidHeatTransferModel "Solid 1" (default) | Solid_material = dommat; pref = 1[atm]
    init1: init "Initial Values 1" (default) | Tinit = T0
    ins1: ThermalInsulation (default)
    sar1: SurfaceToAmbientRadiation on all boundaries | Tamb = T_amb; RadiationDirection = Upside
  rpm2: ParticipatingMediaRadiation "Radiation in Participating Media" [geom2] on all domains
    dependent variable radiativeintensity
    ParticipatingMediaSettingsProperty.RadiationDiscretizationMethod = P1Approximation
    rpm1: ParticipatingMedium (default) | Ginit = (4*pi)*rpm2.Ibinit
    os1: OpaqueSurface (default) | WallType = GrayWall
  ht3: HeatTransfer "Heat Transfer in Solids" [geom3] on all domains
    dependent variable T
    solid1: SolidHeatTransferModel "Solid 1" (default) | Solid_material = dommat; pref = 1[atm]
      otpm1: OpticallyThickParticipatingMedium on all domains | nrad = nr
    init1: init "Initial Values 1" (default) | Tinit = T0
    ins1: ThermalInsulation (default)
    sar1: SurfaceToAmbientRadiation on all boundaries | Tamb = T_amb; RadiationDirection = Upside

Multiphysics
  htrpm1: HeatTransferWithRadiationInParticipatingMedia [comp1] on all domains | Heat_physics = ht; RPM_physics = rpm
  htrpm2: HeatTransferWithRadiationInParticipatingMedia [comp2] on all domains | Heat_physics = ht2; RPM_physics = rpm2

Mesh
  mesh1 "Mesh 1" [geom1]
    size: MeshSizeDefault | hmin = 0.18; hcurve = 0.6; hnarrow = 0.5; hgrad = 1.5
    ftri1: FreeTri "Free Triangular 1" on boundaries 4
      size1: Size on edges 4, 5, 8, 11 | hauto = 2
      size2: Size on boundaries 4 | hauto = 4
    swe1: Sweep "Swept 1" on remaining entities
      dis1: Distribution on all domains | numelem = 8
  mesh2 "Mesh 2" [geom2]
    imp1: Import | source = sequence
    fin: Finalize
  mesh3 "Mesh 3" [geom3]
    imp1: Import | source = sequence
    fin: Finalize

Studies
  std1 "Study 1: DOM"
    param: Parametric "Parametric Sweep" | pname = k; plistarr = 5 70 120
    time: Transient "Time Dependent" | tlist = 10; solve for = {ht, rpm}; activateCoupling = {htrpm1, on, htrpm2, off}
  std2 "Study 2: P1"
    param1: Parametric "Parametric Sweep" | pname = k; plistarr = 5 70 120
    time1: Transient "Time Dependent" | tlist = 10; solve for = {ht2, rpm2}; activateCoupling = {htrpm1, off, htrpm2, on}
  std3 "Study 3: Rosseland"
    param1: Parametric "Parametric Sweep" | pname = k; plistarr = 5 70 120
    time1: Transient "Time Dependent" | tlist = 10; solve for = {ht3}; activateCoupling = {htrpm1, off, htrpm2, off}

Solver configurations
  sol1 "Solution 1" (study std1)
    v1: Variables "Dependent Variables 1"
    t1: Time "Time-Dependent Solver 1"
      tlist = 10
      atolmethod = {comp1_rpm_I, global, comp1_T, global, comp2_T, global, comp2_rpm2_GP1, global, comp3_T, global}
      atolvaluemethod = {comp1_rpm_I, factor, comp1_T, factor, comp2_T, factor, comp2_rpm2_GP1, factor, comp3_T, factor}
      atol = {comp1_rpm_I, 1e-3, comp1_T, 1e-3, comp2_T, 1e-3, comp2_rpm2_GP1, 1e-3, comp3_T, 1e-3}
      maxorder = 2
      estrat = exclude
      se1: Segregated | segstabacc = segaacc; segaaccdim = 5; segaaccmix = 0.9; segaaccdelay = 1
        ss1: SegregatedStep "Heat transfer T" | segvar = {comp1_T}; linsolver = d1; subdamp = 0.8; subjtech = once
        ss2: SegregatedStep "Radiative intensities 1"
          segvar = {comp1_rpm_I}
          segvarspec = manual
          linsolver = d2
          subdamp = 0.3
        ss3: SegregatedStep "Radiative intensities 10"
          segvar = {comp1_rpm_I}
          segvarspec = manual
          linsolver = d2
          subdamp = 0.3
        ss4: SegregatedStep "Radiative intensities 11"
          segvar = {comp1_rpm_I}
          segvarspec = manual
          linsolver = d2
          subdamp = 0.3
        ss5: SegregatedStep "Radiative intensities 12"
          segvar = {comp1_rpm_I}
          segvarspec = manual
          linsolver = d2
          subdamp = 0.3
        ss6: SegregatedStep "Radiative intensities 2"
          segvar = {comp1_rpm_I}
          segvarspec = manual
          linsolver = d2
          subdamp = 0.3
        ss7: SegregatedStep "Radiative intensities 3"
          segvar = {comp1_rpm_I}
          segvarspec = manual
          linsolver = d2
          subdamp = 0.3
        ss8: SegregatedStep "Radiative intensities 4"
          segvar = {comp1_rpm_I}
          segvarspec = manual
          linsolver = d2
          subdamp = 0.3
        ss9: SegregatedStep "Radiative intensities 5"
          segvar = {comp1_rpm_I}
          segvarspec = manual
          linsolver = d2
          subdamp = 0.3
        ss10: SegregatedStep "Radiative intensities 6"
          segvar = {comp1_rpm_I}
          segvarspec = manual
          linsolver = d2
          subdamp = 0.3
        ss11: SegregatedStep "Radiative intensities 7"
          segvar = {comp1_rpm_I}
          segvarspec = manual
          linsolver = d2
          subdamp = 0.3
        ss12: SegregatedStep "Radiative intensities 8"
          segvar = {comp1_rpm_I}
          segvarspec = manual
          linsolver = d2
          subdamp = 0.3
        ss13: SegregatedStep "Radiative intensities 9"
          segvar = {comp1_rpm_I}
          segvarspec = manual
          linsolver = d2
          subdamp = 0.3
        ll1: LowerLimit | lowerlimit = comp1.T 0
        ht21: SegregatedStep
        rpm21: SegregatedStep "Segregated Step 21a"
        ht31: SegregatedStep
      d1: Direct "PARDISO (ht)" | linsolver = pardiso; pivotperturb = 1.0E-13
      d2: Direct "PARDISO (rpm)" | linsolver = pardiso; pivotperturb = 1.0E-13
  sol2 "Parametric Solutions 1" (study std1)
  sol6 "Solution 6" (study std2)
    v1: Variables "Dependent Variables 1"
    t1: Time "Time-Dependent Solver 1"
      tlist = 10
      atolmethod = {comp1_rpm_I, global, comp1_T, global, comp2_rpm2_GP1, global, comp2_T, global, comp3_T, global}
      atolvaluemethod = {comp1_rpm_I, factor, comp1_T, factor, comp2_rpm2_GP1, factor, comp2_T, factor, comp3_T, factor}
      atol = {comp1_rpm_I, 1e-3, comp1_T, 1e-3, comp2_rpm2_GP1, 1e-3, comp2_T, 1e-3, comp3_T, 1e-3}
      maxorder = 2
      estrat = exclude
      se1: Segregated | segstabacc = segaacc; segaaccdim = 5; segaaccmix = 0.9; segaaccdelay = 1
        ss1: SegregatedStep "Heat transfer T" | segvar = {comp2_T}; linsolver = d1; subdamp = 0.8; subjtech = once
        ss2: SegregatedStep "Heat transfer rpm2.GP1"
          segvar = {comp2_rpm2_GP1}
          linsolver = d2
          subdamp = 0.8
          subjtech = once
        ll1: LowerLimit | lowerlimit = comp2.T 0
        ht31: SegregatedStep
      d1: Direct "PARDISO (ht2)" | linsolver = pardiso; pivotperturb = 1.0E-13
      d2: Direct "PARDISO (rpm2)" | linsolver = pardiso; pivotperturb = 1.0E-13
  sol7 "Parametric Solutions 2" (study std2)
  sol11 "Solution 11" (study std3)
    v1: Variables "Dependent Variables 1"
    t1: Time "Time-Dependent Solver 1"
      tlist = 10
      atolmethod = {comp1_rpm_I, global, comp1_T, global, comp2_rpm2_GP1, global, comp2_T, global, comp3_T, global}
      atolvaluemethod = {comp1_rpm_I, factor, comp1_T, factor, comp2_rpm2_GP1, factor, comp2_T, factor, comp3_T, factor}
      atol = {comp1_rpm_I, 1e-3, comp1_T, 1e-3, comp2_rpm2_GP1, 1e-3, comp2_T, 1e-3, comp3_T, 1e-3}
      maxorder = 2
      estrat = exclude
      fc1: FullyCoupled
        linsolver = d1
        maxiter = 5
        damp = 0.9
        jtech = once
        stabacc = aacc
        aaccdim = 5
        aaccmix = 0.9
        aaccdelay = 1
      d1: Direct "PARDISO (ht3)" | linsolver = pardiso; pivotperturb = 1.0E-13
  sol12 "Parametric Solutions 3" (study std3)

Datasets
  dset1: Solution | solution = sol1
  dset2: Solution | solution = sol2
  dset3: Solution | solution = sol6
  dset4: Solution | solution = sol6
  dset5: Solution | solution = sol7
  dset6: Solution | solution = sol7
  dset7: Solution | solution = sol11
  dset8: Solution | solution = sol11
  dset9: Solution | solution = sol11
  dset10: Solution | solution = sol12
  dset11: Solution | solution = sol12
  dset12: Solution | solution = sol12
  cln1: CutLine3D | data = dset2; genpoints = {{0, 0, 0}, {0, 0, 1.5}}
  cln2: CutLine3D | data = dset6; genpoints = {{0, 0, 0}, {0, 0, 1.5}}
  cln3: CutLine3D | data = dset12; genpoints = {{0, 0, 0}, {0, 0, 1.5}}

Plots
  pg1: PlotGroup3D "Temperature (ht)" | data = dset2
    surf1: Surface | expr = T
  pg2: PlotGroup3D "Isothermal Contours (ht)" | data = dset2
    iso1: Isosurface | expr = T
  pg3: PlotGroup3D "Incident Radiation (rpm)" | data = dset2
    slc1: Slice | expr = rpm.G
  pg4: PlotGroup3D "Net Radiative Heat Flux (rpm)" | data = dset2
    surf1: Surface | expr = rpm.qr_net
  pg5: PlotGroup3D "Temperature (ht2)" | data = dset6
    surf1: Surface | expr = T
  pg6: PlotGroup3D "Isothermal Contours (ht2)" | data = dset6
    iso1: Isosurface | expr = T
  pg7: PlotGroup3D "Incident Radiation (rpm2)" | data = dset6
    slc1: Slice | expr = rpm2.G
  pg8: PlotGroup3D "Net Radiative Heat Flux (rpm2)" | data = dset6
    surf1: Surface | expr = rpm2.qr_net
  pg9: PlotGroup3D "Temperature (ht3)" | data = dset12
    surf1: Surface | expr = T
  pg10: PlotGroup3D "Isothermal Contours (ht3)" | data = dset12
    iso1: Isosurface | expr = T
  pg11: PlotGroup1D "Temperature at Central Line for k = 5" | data = dset1; title = Temperature at Central Line
    lngr1: LineGraph | data = cln1; expr = T; legends = DOM
    lngr2: LineGraph | data = cln2; expr = T; legends = P1
    lngr3: LineGraph | data = cln3; expr = T; legends = Rosseland
  pg12: PlotGroup1D "Temperature at Central Line for k = 120" | data = dset1; title = Temperature at Central Line
    lngr1: LineGraph | data = cln1; expr = T; legends = DOM
    lngr2: LineGraph | data = cln2; expr = T; legends = P1
    lngr3: LineGraph | data = cln3; expr = T; legends = Rosseland