// COMSOL Multiphysics 5.4.0.212 model "parallel_plates_diffuse_specular.mph"
// Mixed Diffuse-Specular Radiation Benchmark
// modeldescr_heat/parallel_plates_diffuse_specular
// This example shows how to use the Mathematical Particle Tracing interface to simulate radiative heat transfer with diffuse and specular reflection between surfaces in an enclosure. This example is separated into two parts. The first part compares the heat flux computed by the Mathematical Particle Tracing interface with the exact analytical solution for two identical infinitely long parallel gray plates under mixed diffuse-specular reflection at constant temperature. The second part couples the Mathematical Particle Tracing interface with the Heat Transfer in Solids interface for the parallel plate geometry but with different characteristics and spatially varying temperatures.
// Outline of the model tree

Parameters
  w = 10[cm]  // Width of the plates
  d = 10[cm]  // Distance between the plates
  l = 2*w  // Length of the plates
  th = w/20  // Thickness of the plates
  M = 20  // Number of ray bundles along the width of the plates (number of elements)
  N = 300  // Number of rays per bundle
  Delta_theta = 2*pi/N  // Solid angle subtended per ray
  T0 = 300[K]  // Room temperature

Variables
  var1 "Definitions"
    H_ij = nojac(1/pi*sigma_const*bndenv(Ts)^4*abs(cos(theta_emit))*Delta_theta)  // Irradiance per ray
    Eb = sigma_const*Ts^4  // Blackbody emissive power
    rho = 1-epsilon  // Surface reflectance
    q = -epsilon*(Eb-pt.inl1.nacc1.rpi)  // Heat flux
  var2 "Surrounding: Study 1" on selection sel1
    Ts = 0[K]  // Temperature of the surrounding
    epsilon = 1  // Emittance of the surrounding
    gamma_s = 0  // Probability of specular reflection
  var3 "Lower Plate: Study 1" on selection sel2
    Ts = T0  // Temperature of the lower plate
    epsilon = 0.6  // Emittance of the lower plate
    gamma_s = 0.8  // Probability of specular reflection
  var4 "Upper Plate: Study 1" on selection sel3
    Ts = T0  // Temperature of the upper plate
    epsilon = 0.6  // Emittance of the upper plate
    gamma_s = 0.8  // Probability of specular reflection
  var5 "Surrounding: Study 2" on selection sel1
    Ts = T0  // Temperature of the surrounding
    epsilon = 1  // Emittance of the surrounding
    gamma_s = 0  // Probability of specular reflection
  var6 "Lower Plate: Study 2" on selection sel2
    Ts = T  // Temperature of the lower plate
    epsilon = 0.9  // Emittance of the lower plate
    gamma_s = 0.1  // Probability of specular reflection
  var7 "Upper Plate: Study 2" on selection sel3
    Ts = T  // Temperature of the upper plate
    epsilon = 0.6  // Emittance of the upper plate
    gamma_s = 0.8  // Probability of specular reflection

Selections
  sel1: Explicit "Surrounding" on boundaries 1-5, 7-9, 32, 33
  sel2: Explicit "Lower Plate" on boundaries 10-13, 18, 20, 21, 26, 28, 30
  sel3: Explicit "Upper Plate" on boundaries 14-17, 22, 24, 25, 27, 29, 31

Geometry
  geom1 "Geometry 1" (3D, length unit m)
    blk1: Block | base = center; size = {2*w, l, 2*w}
    blk2: Block | pos = {0, 0, -(d+th)/2}; base = center; size = {w, l, th}
    blk3: Block | pos = {0, 0, (d+th)/2}; base = center; size = {w, l, th}
    wp1: WorkPlane | quickplane = xz; unite = on
    par1: Partition "Partition Objects 1" | input = blk1, blk2, blk3; partitionwith = workplane; workplane = wp1
    fin: Finalize "Form Union"
  pgeom_pt "Geometry" (1D, length unit m)
    pt1: Point

Materials
  mat1: Common "Quartz" on domains 3, 5
    def "Basic"
      thermalconductivity = 1.1[W/(m*K)]
      density = 2200[kg/m^3]
      heatcapacity = 480[J/(kg*K)]
  mat2: Common "Copper" on domains 4, 6
    def "Basic"
      thermalconductivity = 400[W/(m*K)]
      density = 8700[kg/m^3]
      heatcapacity = 385[J/(kg*K)]

Physics
  pt: MathParticle "Mathematical Particle Tracing" on domains 1, 2
    dependent variable q = {qx, qy, qz}
    MaximumSecondary.MaximumSecondary = 0
    wall1: Wall (default)
    pp1: ParticleProperties | mp = me_const; mprest = me_const; SpecifyHamiltonian = Directly
    aux1: AuxiliaryField "Auxiliary Dependent Variable 1"
      fieldVariableName = theta_emit
      DependentVariableQuantity = planeangle
    inl1: Inlet on boundaries 10, 13, 14, 16, 18, 21, 22, 24, 28-31
      InitialVelocity = ConstantSpeedHemisphere
      Nvel = N
      rax = {0, 0, 1}
      SpecifyInletTangentialNormal = 1
      aux0_aux1 = pt.inl1.thetarel
      nacc1: NonlocalAccumulator on all boundaries
        AccumulatorType = Count
        R = H_ij
        SourceGeometricEntityLevel = Boundaries
        DependentVariableQuantity = radiativeintensity
    wall2: Wall on boundaries 2, 9 | WallCondition = Bounce
    wall3: Wall on boundaries 1, 3-5, 7, 8, 10, 12-14, 16-18, 20-22, 24, 25, 28-33
      WallCondition = MixedDiffuseSpecular
      gammas = gamma_s
      PrimaryParticleCondition = Probability
      gamma = rho
  ht: HeatTransfer "Heat Transfer in Solids" on domains 3-6
    dependent variable T
    solid1: SolidHeatTransferModel "Solid 1" (default)
    init1: init "Initial Values 1" (default) | Tinit = T0
    ins1: ThermalInsulation (default)
    temp1: TemperatureBoundary "Temperature 1" on boundaries 29, 31 | T0 = T0
    hf1: HeatFluxBoundary "Heat Flux 1" on boundaries 17, 25 | q0 = 5e6[W/m^2]*exp(-((x+0.025[m])^2+y^2)/0.0001[m^2])
    hf2: HeatFluxBoundary "Heat Flux 2" on boundaries 12, 20 | HeatFluxType = ConvectiveHeatFlux; h = 10; Text = T0
    hf3: HeatFluxBoundary "Heat Flux 3" on boundaries 10, 13, 14, 16, 18, 21, 22, 24, 28-31 | q0 = q

Mesh
  mesh1 "Mesh 1"
    size: MeshSizeDefault | hmax = 0.02; hmin = 0.0036; hcurve = 0.6; hnarrow = 0.5; hgrad = 1.5
    map1: Map "Mapped 1" on boundaries 11, 15
      dis1: Distribution on edges 16, 18, 21, 23 | numelem = M
      dis2: Distribution on edges 14, 19, 40, 43 | numelem = 1
    ftri1: FreeTri "Free Triangular 1" on boundaries 2
    swe1: Sweep "Swept 1" on remaining entities

Studies
  std1 "Study 1"
    time: Transient "Time Dependent" | tlist = 0,1.5; solve for = {pt}; disabledvariables = {var5, var6, var7}
  std2 "Study 2"
    stat: Stationary | solve for = {ht}; disabledvariables = {var2, var3, var4}
    time: Transient "Time Dependent" | tlist = 0,1.5; solve for = {pt}; disabledvariables = {var2, var3, var4}

Solver configurations
  sol1 "Solution 1" (study std1)
    v1: Variables "Dependent Variables 1"
    t1: Time "Time-Dependent Solver 1"
      tlist = 0,1.5
      rtol = 1.0E-5
      atolglobalvaluemethod = manual
      atolglobal = 1.0E-6
      timemethod = genalpha
      estrat = exclude
      tstepsgenalpha = strict
      maxstepconstraintgenalpha = const
      maxstepgenalpha = 0.01
      rhoinf = 0.2
      fc1: FullyCoupled | linsolver = i1; jtech = once
      i1: Iterative
        ja1: Jacobi
  sol2 "Solution 2" (study std2)
    v3: Variables "Dependent Variables 0"
    for1: For | iter = 3
    v1: Variables "Dependent Variables 1" | notsolmethod = sol
    s1: Stationary "Stationary Solver 1"
      fc1: FullyCoupled | linsolver = d1; initstep = 0.01; minstep = 1.0E-6; maxiter = 50
      d1: Direct "PARDISO (ht)" | linsolver = pardiso; pivotperturb = 1.0E-13
    su1: StoreSolution
    v2: Variables "Dependent Variables 2" | notsolmethod = sol
    t1: Time "Time-Dependent Solver 1"
      tlist = 0,1.5
      rtol = 1.0E-5
      atolglobalvaluemethod = manual
      atolglobal = 1.0E-6
      timemethod = genalpha
      estrat = exclude
      tstepsgenalpha = strict
      maxstepconstraintgenalpha = const
      maxstepgenalpha = 0.01
      rhoinf = 0.2
      fc1: FullyCoupled | linsolver = i1; jtech = once
      i1: Iterative
        ja1: Jacobi
    endfor1: EndFor
  sol3 "Solution Store 1" (study std2)

Datasets
  dset1: Solution | solution = sol1
  dset2: Solution | solution = sol2
  dset3: Solution | solution = sol3
  surf1: Surface on boundaries 13, 21 | data = dset2; param = xy

Tables
  tbl1: Table "epsilon=0.6, gamma_s=0.8"
    Column 1 | Column 2
    -0.499455 | -0.720418
    -0.497131 | -0.719911
    -0.492958 | -0.719003
    -0.486952 | -0.717703
    -0.479134 | -0.716022
    -0.469534 | -0.713976
    -0.458187 | -0.711585
    -0.445136 | -0.708873
    -0.430428 | -0.70587
    -0.41412 | -0.70261
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
Plots
  pg1: PlotGroup1D "Validation" | data = dset1
    lngr1: LineGraph on edges 28 | expr = q/(epsilon*Eb); xdata = expr; xdataexpr = x/w; legends = Lower plate
    lngr2: LineGraph on edges 31 | expr = q/(epsilon*Eb); xdata = expr; xdataexpr = x/w; legends = Upper plate
    tblp1: Table "Table Graph 1" | table = tbl1; legends = Gauss quadrature
  pg2: PlotGroup3D "3D Plot Group 2" | data = dset2
    surf1: Surface | expr = T; descr = Temperature
  pg3: PlotGroup2D "2D Plot Group 3" | data = surf1
    surf1: Surface | expr = T; descr = Temperature
  pg4: PlotGroup1D "1D Plot Group 4" | data = dset2
    lngr1: LineGraph on edges 28 | expr = q; xdata = expr; xdataexpr = x; legends = Lower plate
    lngr2: LineGraph on edges 31 | expr = q; xdata = expr; xdataexpr = x; legends = Upper plate